<?xml version="1.0" ?>
<Lems xmlns="http://www.neuroml.org/lems/0.7.3" xmlns:xsi="http://www.w3.org/2001/XMLSchema-instance" xsi:schemaLocation="http://www.neuroml.org/lems/0.7.3 https://raw.githubusercontent.com/LEMS/LEMS/development/Schemas/LEMS/LEMS_v0.7.3.xsd">
  <Component id="MF_Input" period="300 ms" type="spikeGenerator"/>
  <Component ibase="200 pA" id="AlphaSyn" tau="30 ms" type="alphaCurrentSynapse"/>
  <Component averageRate="30 Hz" id="MF_Poisson" type="spikeGeneratorPoisson"/>
</Lems>
